P0 := 101325
fe := 1010
f - частота
R := 287
Tvx := 300  # а - местная скорость звука в резонаторе
mvoz := 0.025346  # L - длина резонатора
q := 120000000
stecheo := 0.1*3/20
n := 0.8
L := 0.1106
k := 1.4
mg := mvoz*stecheo = 0.00038019
P1 := P0 = 101325
T1 := Tvx*P1/P0 = 300
Q := mg*q*n = 36498.2
cv := R/(k - 1) = 717.5
T2 := T1 + Q/((mvoz + mg)*cv) = 2277.31
a := sqrt(k*R*T2) = 956.568
f := a/(4*L) = 2162.22
P2 := P1*T2/T1 = 769161
P3 := P0
T3 := T2*(Vks/V3)^(k - 1)  # error: Эта переменная не определена.
va := sqrt(2*k*R*T2*(1 - (P0/P2)^((k - 1)/k))/(k - 1)) = 1418.2
dI := mg*va = 0.539186
Fср := dI*f = 1165.84
