# Дано
Атмосфера
sqrt(Топливо)  # Полётное задание
mp := 50
# масса полез
# марш ск
# коэф лоб соп
Pn := 101325
st := 14.7  # стехеометрическое  # Программа
vm := 300
Tn := 294
tpol := 30
# В file:///C:/Users/dimaa/Desktop/%D0%9C%D0%B0%D1%82%D1%8C%20%D0%BC%D0%BE%D0%B4%D0%B5%D0%BB%D1%8C/etd.pdf
# есть экспериментальные данные  под наш каллибро
Qsgor := 43*10^6
cx := 0.82
pn := 1.2255
# Метод Характеристик
d := 0.151  # каллибр
cpvoz := 1006
it := 3283
(Электро - акустическая)*аналогия
cvvoz := 717
Lks := 0.2  # длина кс
Rvoz := 289
cx := 0.82
k := 1.4
Vks := π*d^2*Lks/4 = 0.00358157  # объём кс
(ht - энтальпия)*торможения
ht := h + va^2/2  # disabled
h - энтальпия*(газа*на)*выходе
h := cp*T
P := 0.5*cx*pn*vm^2*π*d^2/4 = 809.811  # тяга
Ip := P*tpol = 24294.3  # Вот эту формулу проверить
mt := Ip/it = 7.40004
mras := mt/tpol = 0.246668  # ОЧЕНЬ МАЛАЯ СКОРОСТЬ
# У тех у кого есть возможность расчёта  без эксперимента, решить обратную задачу остальных сравнить с эксперимнетом
va := P/mt = 109.433
# Через цикл Ленура и энтальпию
mvoz := pn*Vks = 0.00438922
mgor := mvoz/st = 0.000298586
Qcikla := mgor*Qsgor = 12839.2
cvtop := cvvoz/(1 + 1/st) = 671.331
Rtop := Rvoz/(1 + 1/st) = 270.592
T1 := Tn + Qcikla/((mgor + mvoz)*cvtop) = 4373.74
P1 := Pn*(T1/Tn) = 1507377
Ta := T1*(Pn/P1)^((k - 1)/k) = 2022.33  # Температура выхода
va := sqrt(2*cpvoz*(T1 - Ta)) = 2175.09
# эффективная скорость
# истечения
mdt := P/va = 0.372311  # массовый расход
f := mdt/(mgor + mvoz) = 79.4211
Lrez := sqrt(k*Rtop*Ta)/(4*f) = 2.75519
# Термодинамическая схема Харрата
# У этого и следующего пидорка надо разобраться с вычислением определённых характеристик
ε1 := □
L := □
φ := □  # фаза рабочего процесса
ε0 := L - ε1
X := L + ε1
f := □
Ρ := (1 - (f*L)*cos(f*X)*cos(φ)*(1 - (ε0/L))^(sin(f*X)*cos(φ))*ln(1 - (ε0/L))^-1)^(-k)  # Перепад давлений  # P/P0
M := ((2/(k - 1))*((1 - f*L*cos(φ)*ln(1 - ε0/L)^-1)^(k - 1) - 1))^(1/2)
# Потеря полного давления
(P0 - P2)/P0
Ρp := 1 - Ρ*((1 + (k - 1)*M2^2/2)/(1 + (k - 1)*M0^2/2))^(k/(k - 1))
# Физическая модель Побежимова
ra := □
va := □
# выходная скорость
t := □
# время иннерционного истечения
Vtbs := □  # pi
V := □
# Объём проточной части
Pdon := □
etr := □
eras := □
Vvit := □
Pcp := Pn*(1 - π*ra^2*vl*t/V)
Pmin := Pn*(2*(1 - π*ra^2*va*t/V)^2 - 1)
Pmax := Pdon*etr*eras*((Vtbs*(pi^(1/k) - 1) + 1 + Vvit)/(1 + Vvit))^k
f := sqrt(k*Rvoz*(Tmax*(Pmin/Pmax)^((k - 1)/k)))/(4*L)
# Модель Ричардса
# esign and Development of Valveless Pulsejet
# Engine
# Shivang Modi, Sahil Khinchi, Nirmit Rajpurohit, Ankit Rami and Sathish.D
# Department of Aeronautical Engineering
# Silver Oak College of Engineering & Technology
# Ahmedabad, India
# AN ACOUSTIC ANALYSIS OF VALVELESS
# PULSEJET ENGINES
# Daanish Maqbool, Doctor of Philosophy, 2015
# Associate Professor, Christopher P. Cadou,
# Department of Aerospace Engineering
# Модель Рейнста
